<?xml version="1.0" encoding="UTF-8"?>
<channelml xmlns="http://morphml.org/channelml/schema"
    xmlns:xsi="http://www.w3.org/2001/XMLSchema-instance"
    xmlns:meta="http://morphml.org/metadata/schema"
    xsi:schemaLocation="http://morphml.org/channelml/schema  http://www.neuroml.org/NeuroMLValidator/NeuroMLFiles/Schemata/v1.8.1/Level2/ChannelML_v1.8.1.xsd"
    units="Physiological Units">

    <meta:notes>ChannelML file describing a single synaptic mechanism</meta:notes>

    <synapse_type name="GapJunction">

        <status value="in_progress">
            <meta:contributor>
                <meta:name>Padraig Gleeson</meta:name>
                <meta:comment> Note: This is not (yet) based on experimental data from C. elegans</meta:comment>
            </meta:contributor>
        </status>

        <meta:notes>Electrical connection from a cell. A generic GJ is used as a first approximation for all electrical connections</meta:notes>

        <electrical_syn conductance="1.00E-9"/>

    </synapse_type>

</channelml>
